#define VOLTDUMP=off
#define LOADS=on
#define STARTTIME=2021-09-01 12:00:00 PST
#define STOPTIME=2021-09-01 15:00:00 PST
#define STARTRECORDTIME=2021-09-01 12:00:00 PST
#define WEATHER="CA-San_Francisco_Intl_Ap.tmy3"
